# OpenSim document version 40000
InverseKinematicsTool ik_tool:
  model_file: C:\Users\paulo\Modelos_OpenSim_Teste\16_BC_scaled.osim
  marker_file: C:\Users\paulo\Modelos_OpenSim_Teste\Gait Dataset\TRC_Output\1_00.trc
  output_motion_file: C:\Users\paulo\Modelos_OpenSim_Teste\Gait Dataset\TRC_Output\1_00_ik.mot
  time_range: 0 29.76
  report_errors: true
  IKTaskSet:
    IKMarkerTask R.ASIS: apply=true weight=10
    IKMarkerTask L.ASIS: apply=true weight=10
    IKMarkerTask R.PSIS: apply=true weight=10
    IKMarkerTask L.PSIS: apply=true weight=10
    IKMarkerTask R.Knee: apply=true weight=10
    IKMarkerTask L.Knee: apply=true weight=10
    IKMarkerTask R.Knee.Med: apply=true weight=10
    IKMarkerTask L.Knee.Med: apply=true weight=10
    IKMarkerTask R.Ankle: apply=true weight=10
    IKMarkerTask L.Ankle: apply=true weight=10
    IKMarkerTask R.Ankle.Med: apply=true weight=10
    IKMarkerTask L.Ankle.Med: apply=true weight=10
    IKMarkerTask R.Heel: apply=true weight=10
    IKMarkerTask L.Heel: apply=true weight=10
    IKMarkerTask R.MT1: apply=true weight=10
    IKMarkerTask L.MT1: apply=true weight=10
    IKMarkerTask R.MT5: apply=true weight=10
    IKMarkerTask L.MT5: apply=true weight=10
    IKMarkerTask R.THIGH: apply=true weight=1
    IKMarkerTask L.THIGH: apply=true weight=1
    IKMarkerTask R.FIB: apply=true weight=1
    IKMarkerTask L.FIB: apply=true weight=1
    IKMarkerTask R.TIB: apply=true weight=1
    IKMarkerTask L.TIB: apply=true weight=1
