# OpenSim document version 40000
ScaleTool scale_tool:
  mass: 75
  notes:
    Template de Scale para o pipeline de marcha. A massa, os intervalos de tempo e os campos Unassigned devem ser preenchidos pelo pipeline antes da execução.
  ModelScaler:
    apply: true
    scaling_order: measurements
    time_range: 0.5 1.5
    preserve_mass_distribution: true
    MeasurementSet:
      # ========== PELVE ==========
      Measurement pelvis_width: apply=true
        MarkerPair: markers=(R.ASIS L.ASIS)
        BodyScale pelvis: axes=(X Y Z)
        BodyScale sacrum: axes=(X Y Z)
      # ========== FEMUR DIREITO ==========
      Measurement femur_r: apply=true
        MarkerPair: markers=(R.ASIS R.Knee)
        BodyScale femur_r: axes=(X Y Z)
        BodyScale patella_r: axes=(X Y Z)
      # ========== FEMUR ESQUERDO ==========
      Measurement femur_l: apply=true
        MarkerPair: markers=(L.ASIS L.Knee)
        BodyScale femur_l: axes=(X Y Z)
        BodyScale patella_l: axes=(X Y Z)
      # ========== TIBIA DIREITA ==========
      Measurement tibia_r: apply=true
        MarkerPair: markers=(R.Knee R.Ankle)
        BodyScale tibia_r: axes=(X Y Z)
        BodyScale talus_r: axes=(X Y Z)
        BodyScale calcn_r: axes=(X Y Z)
        BodyScale toes_r: axes=(X Y Z)
      # ========== TIBIA ESQUERDA ==========
      Measurement tibia_l: apply=true
        MarkerPair: markers=(L.Knee L.Ankle)
        BodyScale tibia_l: axes=(X Y Z)
        BodyScale talus_l: axes=(X Y Z)
        BodyScale calcn_l: axes=(X Y Z)
        BodyScale toes_l: axes=(X Y Z)
  MarkerPlacer:
    apply: true
    time_range: 0.5 1.5
    max_marker_movement: -1
    IKTaskSet:
      # Anatomicos (peso alto)
      IKMarkerTask R.ASIS: apply=true weight=10
      IKMarkerTask L.ASIS: apply=true weight=10
      IKMarkerTask R.PSIS: apply=true weight=10
      IKMarkerTask L.PSIS: apply=true weight=10
      IKMarkerTask R.Knee: apply=true weight=10
      IKMarkerTask L.Knee: apply=true weight=10
      IKMarkerTask R.Knee.Med: apply=true weight=10
      IKMarkerTask L.Knee.Med: apply=true weight=10
      IKMarkerTask R.Ankle: apply=true weight=10
      IKMarkerTask L.Ankle: apply=true weight=10
      IKMarkerTask R.Ankle.Med: apply=true weight=10
      IKMarkerTask L.Ankle.Med: apply=true weight=10
      IKMarkerTask R.Heel: apply=true weight=10
      IKMarkerTask L.Heel: apply=true weight=10
      IKMarkerTask R.MT1: apply=true weight=10
      IKMarkerTask L.MT1: apply=true weight=10
      IKMarkerTask R.MT5: apply=true weight=10
      IKMarkerTask L.MT5: apply=true weight=10
      # Tracking (peso baixo)
      IKMarkerTask R.THIGH: apply=false weight=0
      IKMarkerTask L.THIGH: apply=false weight=0
      IKMarkerTask R.FIB: apply=false weight=0
      IKMarkerTask L.FIB: apply=false weight=0
      IKMarkerTask R.TIB: apply=false weight=0
      IKMarkerTask L.TIB: apply=false weight=0
      # Marcadores do modelo sem correspondente no TRC (desligados)
      IKMarkerTask R.GTR: apply=false weight=0
      IKMarkerTask L.GTR: apply=false weight=0
      IKMarkerTask R.HF: apply=false weight=0
      IKMarkerTask L.HF: apply=false weight=0
      IKMarkerTask R.TT: apply=false weight=0
      IKMarkerTask L.TT: apply=false weight=0
